Bessel
N := 200
i := 0, 1 .. N
xInicio := 0
xFim := 10
x[i] := i/N*(xFim - xInicio) + xInicio
i1 := 5, 6 .. N
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Tabela
α0[0] := 2.4
α0[1] := 5.52
α0[2] := 8.65
α0[3] := 11.79
α0[4] := 14.93
i := 5 .. 100
x[i] := (i + 3/2)*π/2 + (2*i - 1)*π/4
S(z) := root(J0(z), z)
α0[i] := S(x[i])
α0 = [
    2.4; 5.52; 8.65; 11.79; 14.93; 18.0711; 21.2116; 24.3525; 27.4935; 30.6346
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]
