# Equação do Baleiro para a curva de Endrenyi
ρ1 := 100
α := 10
β := .01
k := (β - 1)/(β + 1) = -0.980198
M(α) := 1 + 2*sum(k^n/sqrt(1 + ((2*n)/α)^2), n = 1 .. 100)
M0 := 2*M(α) - M(2*α) = 0.01024
ρa := ρ1*M0 = 1.024
