ρ1 := 580  # resistividade da primeira camada
ρ2 := 80  # resitividade da segunda camada
d := 12  # profundidade da primeira camada
d0 := 1
a := 31.23  # raio da malha
ϕ := 0.5  # razão da profundidade, válido para diversas configurações
α := a/d = 2.6025  # coeficiente de penetração
β := ρ2/ρ1 = 0.137931  # coeficiente de divergência
μ := (β - 1)/(β + 1) = -0.757576  # coeficiente de reflexão
c1(m) := sqrt(1 + ((m + ϕ)/α)^2)
c2(m) := sqrt(1 + ((m - ϕ)/α)^2)
c3(m) := sqrt(1 + (m/α)^2)
k1(m) := α/sqrt(α^2 + (m + ϕ)^2)
k2(m) := α/sqrt(α^2 + (m - ϕ)^2)
k3(m) := α/sqrt(α^2 + m^2)
N := 1 + sum(μ^m*(k1(m)/c1(m) + 2*k3(m)/c3(m) + k2(m)/c2(m)), m = 1 .. 100)/(ln(16*a/d0) + k1(0)/c1(0)) = 0.768038
ρa := N*ρ1 = 445.462  # resistividade aparente
N1(α) := 1 + sum(μ^m*(α/sqrt(α^2 + (m + ϕ)^2)/sqrt(1 + ((m + ϕ)/α)^2) + 2*α/sqrt(α^2 + m^2)/sqrt(1 + (m/α)^2) + α/sqrt(α^2 + (m - ϕ)^2)/sqrt(1 + ((m - ϕ)/α)^2)), m = 1 .. 100)/(ln(16*α*d/d0) + α/sqrt(α^2 + ϕ^2)/sqrt(1 + (ϕ/α)^2))
alfa := 0 .. 100
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