ρ[1] := 10
ρ[2] := 100
h := 1
I[1] := 1
k[1] := (ρ[2] - ρ[1])/(ρ[2] + ρ[1]) = 0.818182
l := 2
V2(x) := ρ[1]*I[1]/(2*π)*(integral(integral((e^(-λ*t) + k[1]*e^(-2*λ*h)*e^(-λ*t))/(1 - k[1]*e^(-2*λ*h))*J0(λ*x), λ = 0 .. ∞), t = 0 .. h) + (1 - k[1])*integral(integral(e^(-λ*t)/(1 - k[1]*e^(-2*λ*h))*J0(λ*x), λ = 0 .. ∞), t = h .. l))
J0(1) = 0.765198
V2(.01) = 11.1684
J0(2) = 0.223891
q(x) := (1 - k[1])*integral(integral(e^(-λ*t)/(1 - k[1]*e^(-2*λ*h))*J0(λ*x), λ = 0 .. ∞), t = h .. l)
rt(x) := integral(integral(e^(-λ*t)/(1 - k[1]*e^(-2*λ*h))*J0(λ*x), λ = 0 .. ∞), t = h .. l)
rt(1) = 1.1436
q(1) = 0.207928
ρ[1]*I[1]/(2*π) = 1.59155
op(x) := integral(integral((e^(-λ*t) + k[1]*e^(-2*λ*h)*e^(-λ*t))/(1 - k[1]*e^(-2*λ*h))*J0(λ*x), λ = 0 .. ∞), t = 0 .. h)
op(1) = 2.30556
ρ[2] := 1
I[2] := 1
t := 1
v2(x) := ρ[2]*I[2]/(2*π)*integral((1 - k[1])*e^(-λ*t)/(1 - k[1]*e^(-2*λ*h))*J0(λ*x), λ = 0 .. ∞)
v2(1) = 0.0388828
vall(x) := ρ[1]*I[1]/(2*π)*integral((e^(-λ*t) + k[1]*e^(-2*λ*h)*e^(-λ*t))/(1 - k[1]*e^(-2*λ*h))*J0(λ*x), λ = 0 .. ∞)
vall(1) = 3.15171
