ρa := 411.8  # resistividade aparente vista pela malha
Amalha := 50*40 = 2000  # area da malha
Ltotal := 1420  # comprimento total dos cabos da malha
h := 0.6  # profundidade em relação a base do solo
Rmalha := ρa*(1/Ltotal + 1/sqrt(20*Amalha)*(1 + 1/(1 + h*sqrt(20/Amalha)))) = 4.29145  # resistencia da malha
