// COMSOL Multiphysics 4.3 (Build: 151) model "discos_paralelos.mph"
// Problema 8.6 do Edminster
// Outline of the model tree

Geometry
  geom1 "Geometry 1" (2D, length unit m)
    r1: Rectangle "disco 1"
      size = {.1, 0.01}
      objSelection: selection geom1_r1_pnt
      objSelection: selection geom1_r1_bnd
      objSelection: selection geom1_r1_dom
    r2: Rectangle "disco2"
      pos = {0, -0.015}
      size = {.1, 0.01}
      objSelection: selection geom1_r2_pnt
      objSelection: selection geom1_r2_bnd
      objSelection: selection geom1_r2_dom
    r3: Rectangle "dieletrico"
      pos = {0, -0.005}
      size = {.1, 0.005}
      objSelection: selection geom1_r3_pnt
      objSelection: selection geom1_r3_bnd
      objSelection: selection geom1_r3_dom
    fin: Finalize "Form Union"

Materials
  mat2 "Material 2" on domains 1, 3
    def "Basic"
      relpermittivity = 1
  mat3 "Material 3" on selection geom1_r3_dom
    def "Basic"
      relpermittivity = 2.2

Physics
  es: Electrostatics on all domains
    dependent variable V
    ccn1: ChargeConservation (default)
    zc1: ZeroCharge (default)
    init1: init "Initial Values 1" (default)
    pot1: ElectricPotential on selection geom1_r1_bnd | V0 = 250
    pot2: ElectricPotential on selection geom1_r2_bnd | V0 = 100

Mesh
  mesh1 "Mesh 1" (physics-controlled)
    size: MeshSizeDefault | hauto = 5

Studies
  std1 "Study 1"
    stat: Stationary

Solver configurations
  sol1 "Solver 1" (study std1)
    v1: Variables "Dependent Variables 1"
    s1: Stationary "Stationary Solver 1"
      dDef: Direct
      fc1: FullyCoupled

Datasets
  dset1: Solution | solution = sol1

Plots
  pg1: PlotGroup2D "Electric potential" | data = dset1
    surf1: Surface | readytoplot = on; expr = V; unit = V; descr = Electric potential
    arws1: ArrowSurface | expr = {es.Ex, es.Ey}; arrowlength = proportional