// COMSOL Multiphysics 4.3 (Build: 151) model "dois_cilindros.mph"
// Outline of the model tree

Geometry
  geom1 "Geometry 1" (3D, length unit m)
    cyl1: Cylinder
      type = solid
      r = 0.001
      h = 0.01
      objSelection: selection geom1_cyl1_pnt
      objSelection: selection geom1_cyl1_edg
      objSelection: selection geom1_cyl1_bnd
      objSelection: selection geom1_cyl1_dom
    cyl2: Cylinder
      type = surface
      r = 0.02
      h = 0.01
      objSelection: selection geom1_cyl2_pnt
      objSelection: selection geom1_cyl2_edg
      objSelection: selection geom1_cyl2_bnd
      objSelection: selection geom1_cyl2_dom
    fin: Finalize "Form Union"

Materials
  mat1 "Material 1" on all domains
    def "Basic"
      relpermittivity = 1

Physics
  es: Electrostatics on all domains
    dependent variable V
    ccn1: ChargeConservation (default)
    zc1: ZeroCharge (default)
    init1: init "Initial Values 1" (default)
    gnd1: Ground on boundaries 3
    pot1: ElectricPotential on selection geom1_cyl2_bnd | V0 = 150

Mesh
  mesh1 "Mesh 1" (physics-controlled)
    size: MeshSizeDefault | hauto = 5

Studies
  std1 "Study 1"
    stat: Stationary

Solver configurations
  sol1 "Solver 1" (study std1)
    v1: Variables "Dependent Variables 1"
    s1: Stationary "Stationary Solver 1"
      fc1: FullyCoupled | linsolver = i1
      i1: Iterative | linsolver = cg; prefuntype = left; rhob = 400; maxlinit = 10000
        mg1: Multigrid
          prefun = amg
          iter = 2
          mgcycle = v
          mcasegen = any
          gmglevels = 1
          scale = 2
          massem = on
          rmethod = longest
          mglevels = 5
          maxcoarsedof = 5000
          amgauto = 3

Datasets
  dset1: Solution | solution = sol1

Plots
  pg1: PlotGroup3D "Electric potential" | data = dset1
    mslc1: Multislice | readytoplot = off; expr = V; unit = V