// COMSOL Multiphysics 4.3 (Build: 151) model "dois_cilindros_2d.mph"
// Problema 8.7 do Edminster
// Outline of the model tree

Geometry
  geom1 "Geometry 1" (2D, length unit m)
    c1: Circle
      r = 0.001
      objSelection: selection geom1_c1_pnt
      objSelection: selection geom1_c1_bnd
      objSelection: selection geom1_c1_dom
    c2: Circle
      r = 0.02
      objSelection: selection geom1_c2_pnt
      objSelection: selection geom1_c2_bnd
      objSelection: selection geom1_c2_dom
    fin: Finalize "Form Union"

Materials
  mat1 "Material 1" on all domains
    def "Basic"
      relpermittivity = 1

Physics
  es: Electrostatics on all domains
    dependent variable V
    ccn1: ChargeConservation (default)
    zc1: ZeroCharge (default)
    init1: init "Initial Values 1" (default)
    gnd1: Ground on selection geom1_c1_bnd
    pot1: ElectricPotential on selection geom1_c2_bnd | V0 = 150

Mesh
  mesh1 "Mesh 1" (physics-controlled)
    size: MeshSizeDefault | hauto = 5

Studies
  std1 "Study 1"
    stat: Stationary

Solver configurations
  sol1 "Solver 1" (study std1)
    v1: Variables "Dependent Variables 1"
    s1: Stationary "Stationary Solver 1"
      dDef: Direct
      fc1: FullyCoupled

Datasets
  dset1: Solution | solution = sol1

Plots
  pg1: PlotGroup2D "Electric potential" | data = dset1
    surf1: Surface | readytoplot = on; expr = V; unit = V