// COMSOL Multiphysics 4.3 (Build: 151) model "exemplo_15_7.mph"
// Exercicio 15.7 do Sadiku
// Outline of the model tree

Geometry
  geom1 "Geometry 1" (2D, length unit m)
    pol1: Polygon
      source = table
      table = {{0, 0}, {1, 0}, {0, 1}}
      objSelection: selection geom1_pol1_pnt
      objSelection: selection geom1_pol1_bnd
      objSelection: selection geom1_pol1_dom
    fin: Finalize "Form Union"

Materials
  mat1 "Material 1" on selection geom1_pol1_dom
    def "Basic"
      relpermittivity = 1

Physics
  es: Electrostatics on all domains
    dependent variable V
    ccn1: ChargeConservation (default)
    zc1: ZeroCharge (default)
    init1: init "Initial Values 1" (default)
    gnd1: Ground on boundaries 1, 2
    pot1: ElectricPotential on boundaries 3 | V0 = 100

Mesh
  mesh1 "Mesh 1" (physics-controlled)
    size: MeshSizeDefault | hauto = 5

Studies
  std1 "Study 1"
    stat: Stationary

Solver configurations
  sol1 "Solver 1" (study std1)
    v1: Variables "Dependent Variables 1"
    s1: Stationary "Stationary Solver 1"
      dDef: Direct
      fc1: FullyCoupled

Datasets
  dset1: Solution | solution = sol1

Plots
  pg1: PlotGroup2D "Electric potential" | data = dset1
    surf1: Surface | readytoplot = on; expr = V; unit = V
    arws1: ArrowSurface | expr = {es.Ex, es.Ey}; arrowlength = normalized