// COMSOL Multiphysics 4.3 (Build: 151) model "quadrado.mph"
// Simples quadrado
// Outline of the model tree

Geometry
  geom1 "Geometry 1" (2D, length unit m)
    sq1: Square | size = 2
    fin: Finalize "Form Union"

Materials
  mat1 "Material 1" on all domains
    def "Basic"
      relpermittivity = 1

Physics
  es: Electrostatics on all domains
    dependent variable V
    ccn1: ChargeConservation (default)
    zc1: ZeroCharge (default)
    init1: init "Initial Values 1" (default)
    gnd1: Ground on boundaries 2, 4
    pot1: ElectricPotential on boundaries 3 | V0 = 100

Mesh
  mesh1 "Mesh 1"
    size: MeshSizeDefault | hmax = 0.04; hmin = 1.5E-4; hcurve = 0.25; hnarrow = 1; hgrad = 1.2; hauto = 2

Studies
  std1 "Study 1"
    stat: Stationary

Solver configurations
  sol1 "Solver 1" (study std1)
    v1: Variables "Dependent Variables 1"
    s1: Stationary "Stationary Solver 1"
      dDef: Direct
      fc1: FullyCoupled

Datasets
  dset1: Solution | solution = sol1

Plots
  pg1: PlotGroup2D "Electric potential" | data = dset1
    surf1: Surface | readytoplot = on; expr = V; unit = V; wireframe = off
  pg2: PlotGroup3D "3D Plot Group 2"